// COMSOL Multiphysics 5.2.1.262 model "funnelsAxial06.mph"
// Outline of the model tree

Parameters
  geomLen = 20[um]
  subHt = 10[um]
  superHt = 15[um]
  pmlSz = 10[um]
  funnelRbot = 5[um]
  funnelRtop = 1.[um]
  funnelHt = 4[um]
  funnelHtB = 1[um]
  funnelHtT = 1[um]
  undHt = 1[um]
  nTop = 1
  nSub = 1
  epsUndZZ = 1
  epsUndRP = 1
  epsFun1ZZ = 1
  epsFun1RP = 1
  epsFunZZ = 1
  epsFunRP = 1
  lam0 = 5[um]
  h0Max = lam0/30
  h0Min = h0Max/3
  rFit = 2.[um]
  zFit = 1[um]
  wFit = 1
  htD = 80[nm]
  htM = 80[nm]
  Nlrs = floor(funnelHt/(htD+htM))
  funnelDR = 50[nm]
  epsD = 10.01
  epsM = -10.01-0.1i
  h0Growth = 1.3

Variables
  var1 "Variables 1"
    kzB = nSub*ewfd.k0

Coordinate systems
  pml1: PML "Perfectly Matched Layer Top" on domains 56, 62 | ScalingType = Cylindrical
  pml2: PML "Perfectly Matched Layer Bot" on domains 1, 57 | ScalingType = Cylindrical
  pml3: PML "Perfectly Matched Layer SideTop" on domains 61 | ScalingType = Cylindrical
  pml4: PML "Perfectly Matched Layer SideBot" on domains 58, 59 | ScalingType = Cylindrical
  pml5: PML "Perfectly Matched Layer 5" on domains 60 | ScalingType = Cylindrical

Geometry
  geom1 "Geometry 1" (2D axisymmetric, length unit m)
    r1: Rectangle
      pos = {0, -subHt-undHt-pmlSz}
      layer = {pmlSz, subHt/2, subHt/2}
      size = {geomLen+pmlSz, subHt+undHt+pmlSz}
    r2: Rectangle | layer = superHt; size = {geomLen+pmlSz, superHt+pmlSz}
    r3: Rectangle | pos = {geomLen, -pmlSz-subHt-undHt}; size = {pmlSz, 2*pmlSz+superHt+subHt+undHt}
    r8: Rectangle | pos = {0, 0}; size = {funnelRbot, htM}
    arr3: Array | contributeto = csel5; input = r8; size = {1, Nlrs}; fullsize = {1, Nlrs}; displ = {0, (htD+htM)}
    uni3: Union
      contributeto = csel5
      input = arr3(1%2C1), arr3(1%2C2), arr3(1%2C3), arr3(1%2C4), arr3(1%2C5), arr3(1%2C6), arr3(1%2C7), arr3(1%2C8), arr3(1%2C9), arr3(1%2C10), arr3(1%2C11), arr3(1%2C12), arr3(1%2C13), arr3(1%2C14), arr3(1%2C15), arr3(1%2C16), arr3(1%2C17), arr3(1%2C18), arr3(1%2C19), arr3(1%2C20), arr3(1%2C21), arr3(1%2C22), arr3(1%2C23), arr3(1%2C24)
    r6: Rectangle | contributeto = csel5; layername = Layer 1; layer = funnelHtB; size = {funnelRbot, funnelHt-funnelHtT}
    b1: BezierPolygon "Bézier Polygon 1"
      contributeto = csel5
      p = {{0, funnelRbot, rFit, funnelRtop, 0, 0}, {0, 0, zFit, funnelHt, funnelHt, 0}}
      degree = {1, 2, 1, 1}
      w = {1, 1, 1, wFit, 1, 1, 1, 1, 1}
    int1: Intersection | contributeto = csel5; input = uni3(1), r6(1), b1(1)
    r5: Rectangle | pos = {0, 0}; size = {funnelRbot, htM}
    arr1: Array | contributeto = csel2; input = r5; size = {1, Nlrs}; fullsize = {1, Nlrs}; displ = {0, (htD+htM)}
    uni1: Union
      contributeto = csel2
      input = arr1(1%2C1), arr1(1%2C2), arr1(1%2C3), arr1(1%2C4), arr1(1%2C5), arr1(1%2C6), arr1(1%2C7), arr1(1%2C8), arr1(1%2C9), arr1(1%2C10), arr1(1%2C11), arr1(1%2C12), arr1(1%2C13), arr1(1%2C14), arr1(1%2C15), arr1(1%2C16), arr1(1%2C17), arr1(1%2C18), arr1(1%2C19), arr1(1%2C20), arr1(1%2C21), arr1(1%2C22), arr1(1%2C23), arr1(1%2C24)
    r9: Rectangle | contributeto = csel2; pos = {0, funnelHt-funnelHtT}; size = {funnelRbot, funnelHtT}
    b2: BezierPolygon "Bézier Polygon 2"
      contributeto = csel2
      p = {{0, funnelRbot, rFit, funnelRtop, 0, 0}, {0, 0, zFit, funnelHt, funnelHt, 0}}
      degree = {1, 2, 1, 1}
      w = {1, 1, 1, wFit, 1, 1, 1, 1, 1}
    int2: Intersection | contributeto = csel5; input = uni1(1), r9(1), b2(1)
    r7: Rectangle | pos = {0, htM}; size = {funnelRbot, htD}
    arr2: Array | contributeto = csel6; input = r7; size = {1, Nlrs}; fullsize = {1, Nlrs}; displ = {0, (htD+htM)}
    uni2: Union
      contributeto = csel6
      input = arr2(1%2C1), arr2(1%2C2), arr2(1%2C3), arr2(1%2C4), arr2(1%2C5), arr2(1%2C6), arr2(1%2C7), arr2(1%2C8), arr2(1%2C9), arr2(1%2C10), arr2(1%2C11), arr2(1%2C12), arr2(1%2C13), arr2(1%2C14), arr2(1%2C15), arr2(1%2C16), arr2(1%2C17), arr2(1%2C18), arr2(1%2C19), arr2(1%2C20), arr2(1%2C21), arr2(1%2C22), arr2(1%2C23), arr2(1%2C24)
    r11: Rectangle | contributeto = csel6; layername = Layer 1; layer = funnelHtB; size = {funnelRbot, funnelHt-funnelHtT}
    b5: BezierPolygon "Bézier Polygon 5"
      contributeto = csel6
      p = {{0, funnelRbot, rFit, funnelRtop, 0, 0}, {0, 0, zFit, funnelHt, funnelHt, 0}}
      degree = {1, 2, 1, 1}
      w = {1, 1, 1, wFit, 1, 1, 1, 1, 1}
    int4: Intersection | contributeto = csel6; input = uni2(1), r11(1), b5(1)
    r10: Rectangle | pos = {0, htM}; size = {funnelRbot, htD}
    arr4: Array | contributeto = csel1; input = r10; size = {1, Nlrs}; fullsize = {1, Nlrs}; displ = {0, (htD+htM)}
    uni4: Union
      contributeto = csel1
      input = arr4(1%2C1), arr4(1%2C2), arr4(1%2C3), arr4(1%2C4), arr4(1%2C5), arr4(1%2C6), arr4(1%2C7), arr4(1%2C8), arr4(1%2C9), arr4(1%2C10), arr4(1%2C11), arr4(1%2C12), arr4(1%2C13), arr4(1%2C14), arr4(1%2C15), arr4(1%2C16), arr4(1%2C17), arr4(1%2C18), arr4(1%2C19), arr4(1%2C20), arr4(1%2C21), arr4(1%2C22), arr4(1%2C23), arr4(1%2C24)
    r12: Rectangle | contributeto = csel1; pos = {0, funnelHt-funnelHtT}; size = {funnelRbot, funnelHtT}
    b4: BezierPolygon "Bézier Polygon 4"
      contributeto = csel1
      p = 
        {0, funnelRbot-funnelDR, rFit-funnelDR, funnelRtop-funnelDR, 0, 0}
        {0, 0, zFit, funnelHt, funnelHt, 0}
      degree = {1, 2, 1, 1}
      w = {1, 1, 1, wFit, 1, 1, 1, 1, 1}
    int3: Intersection | contributeto = csel6; input = uni4(1), r12(1), b4(1)
    b3: BezierPolygon "Bézier Polygon 3"
      contributeto = csel3
      p = {{funnelRtop, rFit, funnelRbot, geomLen+pmlSz}, {funnelHt, zFit, 0, 0}}
      degree = {2, 1}
      w = {1, wFit, 1, 1, 1}
      type = open
    r13: Rectangle
      contributeto = csel3
      layername = Layer 1
      layer = funnelHtB
      size = {geomLen+pmlSz, funnelHt-funnelHtT}
    int5: Intersection | contributeto = csel3; input = b3(1), r13(1)
    pard1: PartitionDomains (disabled)
      domain = int2(1) domains 1-5
      partitionwith = lines
      edge = int5(1) boundaries 1-3
      prob1: GeomError "Error 1"
        error: GeomError | details = Property: vertexline
    fin: Finalize "Form Union"

Materials
  mat1: Common "Substrate" on all domains
    def "Basic"
      relpermeability = 1
      electricconductivity = 0
    RefractiveIndex
      n = nSub
      ki = 0
  mat2: Common "Superstrate" on domains 55, 56, 61, 62
    RefractiveIndex
      n = nTop
      ki = 0
  mat4: Common "dielectricFunnels" on selection geom1_csel6_dom
    RefractiveIndex
      n = sqrt(epsD)
      ki = 0
  mat3: Common "Metal" on selection geom1_csel5_dom
    RefractiveIndex
      n = (sqrt(epsM))
      ki = 0

Physics
  ewfd: ElectromagneticWavesFrequencyDomain on all domains
    dependent variable E = {Er, Ephi, Ez}
    outofplanewavenumber.mFloquet = -1
    wee1: WaveEquationElectric (default)
    axi1: AxialSymmetry (default)
    pec1: PerfectElectricConductor (default)
    init1: init "Initial Values 1" (default)
    wee2: WaveEquationElectric "Wave Equation, Und" on domains 4, 60
      DisplacementFieldModel = RelativePermittivity
      epsilonr_mat = userdef
      epsilonr = diag{epsUndRP, epsUndRP, epsUndZZ}
      mur_mat = userdef
      mur = 1
      sigma_mat = userdef
      sigma = 0
    wee3: WaveEquationElectric "Wave Equation, Funnel 1" (disabled) on domains 5, 17
      DisplacementFieldModel = RelativePermittivity
      epsilonr_mat = userdef
      epsilonr = diag{epsFun1RP, epsFun1RP, epsFun1ZZ}
      mur_mat = userdef
      mur = 1
      sigma_mat = userdef
      sigma = 0
    wee4: WaveEquationElectric (disabled) on domains 18
      DisplacementFieldModel = RelativePermittivity
      epsilonr_mat = userdef
      epsilonr = diag{epsFunRP, epsFunRP, epsFunZZ}
      mur_mat = userdef
      mur = 1
      sigma_mat = userdef
      sigma = 0
    sctr1: Scattering "Scattering Boundary Condition 1" on boundaries 2, 113, 127, 138-144
    pec2: PerfectElectricConductor on selection geom1_csel3_bnd
    port1: Port on boundaries 6 | PortExcitation = on; PortSlit = 1; SlitType = domain_backed; beta = kzB; E0 = {1, 1i, 0}

Mesh
  mesh1 "Mesh 1"
    size: MeshSizeDefault "meshSize" | hmax = h0Max; hgrad = h0Growth; hauto = 5; custom = on
    size1: Size on domains 5-54 | hmax = h0Min; hauto = 5; custom = on
    ftri1: FreeTri "Free Triangular 1" on remaining entities
      xscale = 1
      yscale = 1
      smoothcontrol = on
      smoothmaxiter = 8
      smoothmaxdepth = 8

Studies
  std1 "Study 1"
    freq: Frequency "Frequency Domain" | punit = Hz; plist = c_const/lam0

Solver configurations
  sol1 "Solution 1" (study std1)
  sol2 "Solution 2" (study std1)
    v1: Variables "Dependent Variables 1"
    s1: Stationary "Stationary Solver 1"
      dDef: Direct
      p1: Parametric | pname = freq; plistarr = c_const/lam0; punit = Hz; pcontinuationmode = no
      fc1: FullyCoupled | linsolver = dDef

Datasets
  dset1: Solution | solution = sol1
  dset2: Solution | solution = sol2
  rev1: Revolve2D "Revolution 2D 1" | data = dset2; genpoints = {{0, 0}, {0, 1}}; startangle = -90; revangle = 225

Plots
  pg1: PlotGroup2D "Electric Field (ewfd)" | data = dset2
    surf1: Surface | expr = (ewfd.Er)